<?xml version="1.0"?>
<Node name="root" dt="0.02" gravity="0 -10 0">
    <VisualStyle displayFlags="showBehaviorModels showForceFields" />
    <Node>
        <EulerImplicit name="eulerimplicit_odesolver" printLog="false" />
        <MinResLinearSolver iterations="100" tolerance="1e-20" />
        <MechanicalObject />
        <UniformMass mass="1" />
        <RegularGrid nx="4" ny="4" nz="4" xmin="-9" xmax="-6" ymin="0" ymax="3" zmin="0" zmax="3" />
        <FixedConstraint indices="0 1 2 3 4 5 6 7 8 9 10 11 12 13 14 15" />
        <HexahedronFEMForceField name="FEM" youngModulus="4000" poissonRatio="0.3" method="large" />
    </Node>
</Node>
